// SBML level 3 version 2

model atlas_rbm_construct_model_from_metabolic_network()

  // Compartments:
  compartment default = 1;

  // Species:
  substanceOnly species __s0 in default = t0_met_ACETYL_COA_cyt; __s0 is "met(name='ACETYL_COA', loc='cyt', dna=None, met=None, prot=None, rna=None)";
  substanceOnly species __s1 in default = t0_met_ALLOLACTOSE_cyt; __s1 is "met(name='ALLOLACTOSE', loc='cyt', dna=None, met=None, prot=None, rna=None)";
  substanceOnly species __s2 in default = t0_met_Alpha_lactose_cyt; __s2 is "met(name='Alpha_lactose', loc='cyt', dna=None, met=None, prot=None, rna=None)";
  substanceOnly species __s3 in default = t0_met_Beta_D_Galactosides_cyt; __s3 is "met(name='Beta_D_Galactosides', loc='cyt', dna=None, met=None, prot=None, rna=None)";
  substanceOnly species __s4 in default = t0_met_CO_A_cyt; __s4 is "met(name='CO_A', loc='cyt', dna=None, met=None, prot=None, rna=None)";
  substanceOnly species __s5 in default = t0_met_CPD_15972_cyt; __s5 is "met(name='CPD_15972', loc='cyt', dna=None, met=None, prot=None, rna=None)";
  substanceOnly species __s6 in default = t0_met_CPD_3561_cyt; __s6 is "met(name='CPD_3561', loc='cyt', dna=None, met=None, prot=None, rna=None)";
  substanceOnly species __s7 in default = t0_met_CPD_3785_cyt; __s7 is "met(name='CPD_3785', loc='cyt', dna=None, met=None, prot=None, rna=None)";
  substanceOnly species __s8 in default = t0_met_CPD_3801_cyt; __s8 is "met(name='CPD_3801', loc='cyt', dna=None, met=None, prot=None, rna=None)";
  substanceOnly species __s9 in default = t0_met_D_ARABINOSE_cyt; __s9 is "met(name='D_ARABINOSE', loc='cyt', dna=None, met=None, prot=None, rna=None)";
  substanceOnly species __s10 in default = t0_met_Fructofuranose_cyt; __s10 is "met(name='Fructofuranose', loc='cyt', dna=None, met=None, prot=None, rna=None)";
  substanceOnly species __s11 in default = t0_met_GALACTOSE_cyt; __s11 is "met(name='GALACTOSE', loc='cyt', dna=None, met=None, prot=None, rna=None)";
  substanceOnly species __s12 in default = t0_met_Glucopyranose_cyt; __s12 is "met(name='Glucopyranose', loc='cyt', dna=None, met=None, prot=None, rna=None)";
  substanceOnly species __s13 in default = t0_met_MELIBIOSE_cyt; __s13 is "met(name='MELIBIOSE', loc='cyt', dna=None, met=None, prot=None, rna=None)";
  substanceOnly species __s14 in default = t0_met_PROTON_cyt; __s14 is "met(name='PROTON', loc='cyt', dna=None, met=None, prot=None, rna=None)";
  substanceOnly species __s15 in default = t0_met_WATER_cyt; __s15 is "met(name='WATER', loc='cyt', dna=None, met=None, prot=None, rna=None)";
  substanceOnly species __s16 in default = t0_met__6_Acetyl_Beta_D_Galactosides_cyt; __s16 is "met(name='_6_Acetyl_Beta_D_Galactosides', loc='cyt', dna=None, met=None, prot=None, rna=None)";
  substanceOnly species __s17 in default = t0_prot_lacA_cyt; __s17 is "prot(name='lacA', loc='cyt', dna=None, met=None, prot=None, rna=None, up=None, dw=None)";
  substanceOnly species __s18 in default = t0_prot_lacY_cyt; __s18 is "prot(name='lacY', loc='cyt', dna=None, met=None, prot=None, rna=None, up=None, dw=None)";
  substanceOnly species __s19 in default = t0_prot_lacZ_cyt; __s19 is "prot(name='lacZ', loc='cyt', dna=None, met=None, prot=None, rna=None, up=None, dw=None)";
  substanceOnly species __s20 in default = t0_dna_Alpha_lactose_per; __s20 is "met(name='Alpha_lactose', loc='per', dna=None, met=None, prot=None, rna=None)";
  substanceOnly species __s21 in default = t0_dna_PROTON_per; __s21 is "met(name='PROTON', loc='per', dna=None, met=None, prot=None, rna=None)";
  substanceOnly species __s22 in default = t0_prot_lacY_imem; __s22 is "prot(name='lacY', loc='imem', dna=None, met=None, prot=None, rna=None, up=None, dw=None)";
  substanceOnly species __s23 in default = 0; __s23 is "met(name='MELIBIOSE', loc='per', dna=None, met=None, prot=None, rna=None)";
  substanceOnly species __s24 in default = 0; __s24 is "met(name='CPD_3561', loc='per', dna=None, met=None, prot=None, rna=None)";
  substanceOnly species __s25 in default = 0; __s25 is "met(name='CPD_3785', loc='per', dna=None, met=None, prot=None, rna=None)";
  substanceOnly species __s26 in default = 0; __s26 is "met(name='CPD_3801', loc='per', dna=None, met=None, prot=None, rna=None)";

  // Parameters:
  t0_met_ACETYL_COA_cyt = 0;
  t0_met_ALLOLACTOSE_cyt = 0;
  t0_met_Alpha_lactose_cyt = 0;
  t0_met_Beta_D_Galactosides_cyt = 0;
  t0_met_CO_A_cyt = 0;
  t0_met_CPD_15972_cyt = 0;
  t0_met_CPD_3561_cyt = 0;
  t0_met_CPD_3785_cyt = 0;
  t0_met_CPD_3801_cyt = 0;
  t0_met_D_ARABINOSE_cyt = 0;
  t0_met_Fructofuranose_cyt = 0;
  t0_met_GALACTOSE_cyt = 0;
  t0_met_Glucopyranose_cyt = 0;
  t0_met_MELIBIOSE_cyt = 0;
  t0_met_PROTON_cyt = 0;
  t0_met_WATER_cyt = 100;
  t0_met__6_Acetyl_Beta_D_Galactosides_cyt = 0;
  t0_prot_lacA_cyt = 0;
  t0_prot_lacY_cyt = 0;
  t0_prot_lacZ_cyt = 1;
  fwd_GALACTOACETYLTRAN_RXN = 1;
  rvs_GALACTOACETYLTRAN_RXN = 0;
  fwd_TRANS_RXN_24 = 1;
  rvs_TRANS_RXN_24 = 0;
  fwd_TRANS_RXN_94 = 1;
  rvs_TRANS_RXN_94 = 0;
  fwd_RXN0_7215 = 1;
  rvs_RXN0_7215 = 0;
  fwd_RXN0_7217 = 1;
  rvs_RXN0_7217 = 0;
  fwd_RXN_17755 = 1;
  rvs_RXN_17755 = 0;
  fwd_BETAGALACTOSID_RXN = 1;
  rvs_BETAGALACTOSID_RXN = 0;
  fwd_RXN0_5363 = 1;
  rvs_RXN0_5363 = 1;
  fwd_RXN_17726 = 1;
  rvs_RXN_17726 = 0;
  fwd_RXN0_7219 = 1;
  rvs_RXN0_7219 = 0;
  t0_dna_Alpha_lactose_per = 100;
  t0_dna_PROTON_per = 100;
  t0_prot_lacY_imem = 1;
  var __obs0; __obs0 is "obs_met_ACETYL_COA_cyt";
  var __obs1; __obs1 is "obs_met_ALLOLACTOSE_cyt";
  var __obs2; __obs2 is "obs_met_Alpha_lactose_cyt";
  var __obs3; __obs3 is "obs_met_Beta_D_Galactosides_cyt";
  var __obs4; __obs4 is "obs_met_CO_A_cyt";
  var __obs5; __obs5 is "obs_met_CPD_15972_cyt";
  var __obs6; __obs6 is "obs_met_CPD_3561_cyt";
  var __obs7; __obs7 is "obs_met_CPD_3785_cyt";
  var __obs8; __obs8 is "obs_met_CPD_3801_cyt";
  var __obs9; __obs9 is "obs_met_D_ARABINOSE_cyt";
  var __obs10; __obs10 is "obs_met_Fructofuranose_cyt";
  var __obs11; __obs11 is "obs_met_GALACTOSE_cyt";
  var __obs12; __obs12 is "obs_met_Glucopyranose_cyt";
  var __obs13; __obs13 is "obs_met_MELIBIOSE_cyt";
  var __obs14; __obs14 is "obs_met_PROTON_cyt";
  var __obs15; __obs15 is "obs_met_WATER_cyt";
  var __obs16; __obs16 is "obs_met__6_Acetyl_Beta_D_Galactosides_cyt";
  var __obs17; __obs17 is "obs_met_Alpha_lactose_per";
  var __obs18; __obs18 is "obs_met_PROTON_per";
  var __obs19; __obs19 is "obs_prot_lacY_imem";

  // Assignment rules:
  __obs0 := __s0;
  __obs1 := __s1;
  __obs2 := __s2;
  __obs3 := __s3;
  __obs4 := __s4;
  __obs5 := __s5;
  __obs6 := __s6;
  __obs7 := __s7;
  __obs8 := __s8;
  __obs9 := __s9;
  __obs10 := __s10;
  __obs11 := __s11;
  __obs12 := __s12;
  __obs13 := __s13;
  __obs14 := __s14;
  __obs15 := __s15;
  __obs16 := __s16;
  __obs17 := __s20;
  __obs18 := __s21;
  __obs19 := __s22;

  // Reactions:
  GALACTOACETYLTRAN_RXN: __s0 + __s3 + __s17 -> __s4 + __s16 + __s17; __s0*__s17*__s3*fwd_GALACTOACETYLTRAN_RXN - __s16*__s17*__s4*rvs_GALACTOACETYLTRAN_RXN;
  TRANS_RXN_24: __s20 + __s21 + __s22 -> __s2 + __s14 + __s22; -(__s14*__s2*__s22*rvs_TRANS_RXN_24) + __s20*__s21*__s22*fwd_TRANS_RXN_24;
  TRANS_RXN_94: __s21 + __s22 + __s23 -> __s13 + __s14 + __s22; -(__s13*__s14*__s22*rvs_TRANS_RXN_94 - __s21*__s22*__s23*fwd_TRANS_RXN_94);
  RXN0_7215: __s21 + __s22 + __s24 -> __s6 + __s14 + __s22; -(__s14*__s22*__s6*rvs_RXN0_7215 - __s21*__s22*__s24*fwd_RXN0_7215);
  RXN0_7217: __s21 + __s22 + __s25 -> __s7 + __s14 + __s22; -(__s14*__s22*__s7*rvs_RXN0_7217 - __s21*__s22*__s25*fwd_RXN0_7217);
  RXN_17755: __s21 + __s22 + __s26 -> __s8 + __s14 + __s22; -(__s14*__s22*__s8*rvs_RXN_17755 - __s21*__s22*__s26*fwd_RXN_17755);
  BETAGALACTOSID_RXN: __s5 + __s15 + __s19 -> __s11 + __s12 + __s19; -(__s11*__s12*__s19*rvs_BETAGALACTOSID_RXN) + __s15*__s19*__s5*fwd_BETAGALACTOSID_RXN;
  RXN0_5363: __s2 + __s19 -> __s1 + __s19; -(__s1*__s19*rvs_RXN0_5363) + __s19*__s2*fwd_RXN0_5363;
  RXN_17726: __s6 + __s15 + __s19 -> __s10 + __s11 + __s19; -(__s10*__s11*__s19*rvs_RXN_17726) + __s15*__s19*__s6*fwd_RXN_17726;
  RXN0_7219: __s7 + __s15 + __s19 -> __s9 + __s11 + __s19; -(__s11*__s19*__s9*rvs_RXN0_7219) + __s15*__s19*__s7*fwd_RXN0_7219;
end
